# Вводдные данные
f1 := 500
f2 := 5500
f3 := 3400
f4 := 1000
f5 := 4000
N := 2048
fd := 24000
t := 0, 0.00001 .. 0.01
Fnaotc := fd/N = 11.7188  # Частота ,равное растоянию между отсчётами
colvo := 400/Fnaotc = 34.1333  # Количество отсчётов,на котрое смещаем,
sin_r(t) := sin(2*π*f1*t) + sin(2*π*f2*t) + sin(2*π*f3*t) + sin(2*π*f4*t) + sin(2*π*f5*t)
ShiftUp := 500/(fd/N) = 42.6667
colv := ceil(ShiftUp) = 43  # Кол -во отсчётов для смещения вверх
colm := -|colvo| = -34.1333  # Кол -во отсчётов для смещения вниз
Td := 1/fd = 4.16667e-5
i := 0, 1 .. N - 1
array :=
    for n ∈ 0 .. N - 1
        array[n] ← sin_r(n*Td)
    array
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ДПФ
array_DPF := CFFT(array)
# [component: outputs FileRE]
# [component: outputs FileIm]
array =  # no stored result
array_DPF =  # no stored result
FileComplex :=
    for i ∈ 0 .. last(FileRE)
        out[i] ← FileRE[i] + 1i*FileIm[i]
    out  # error: Недостаточно памяти для этой операции.
FileComplex =  # error: Эта переменная не определена.
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# Смещание частоты
mass_shift_zeros[N - 1] := 0
# [component: outputs ShiftUpIm]
# [component: outputs ShiftUPRe]
# [component: outputs ShiftDownIm]
# [component: outputs ShiftDownRe]
freq_na_otch := fd/N = 11.7188
mass_shift_zerosdown[N - 1] := 0
shift_otchu := colv
shift_otch := ceil(colm)  # Для смещание вверх используем colv,для смещения вниз colm
ShiftUpComplex :=
    for i ∈ 0 .. last(ShiftUPRe)
        out[i] ← ShiftUPRe[i] + 1i*ShiftUpIm[i]
    out  # error: Индекс массива является недопустимым для этого массива.
ShiftDownComplex :=
    for i ∈ 0 .. last(ShiftDownRe)
        out[i] ← ShiftDownRe[i] + 1i*ShiftDownIm[i]
    out
count_last_freq := 4000/freq_na_otch = 341.333
last_otch_int := ceil(count_last_freq) = 342
mass_shift_zeros =  # no stored result
polosa_freq := submatrix(array_DPF, 0, last_otch_int, 0, 0)  # Полоса частот,которую мы будем смещать
mass_inject_into_zeros :=
    mass_shift_zeros[N - 1] ← 0
    for i ∈ 0 .. last_otch_int - 1
        mass_shift_zeros[i + shift_otchu] ← polosa_freq[i]
        mass_shift_zeros[N - shift_otchu - i] ← polosa_freq[i]
    mass_shift_zeros
# Шифт вверх
mass_inject_into_zeros_down :=
    mass_shift_zerosdown[N - 1] ← 0
    for i ∈ |1 - last_otch_int| .. |shift_otch|
        mass_shift_zerosdown[i + shift_otch] ← polosa_freq[i]
        mass_shift_zerosdown[N - shift_otch - i] ← polosa_freq[i]
    mass_shift_zerosdown
# Шифт вниз
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# Шифт вверх
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# Шифт вверх C++
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# Шифт вниз
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# Шифт вниз C++
ОДПФ
# [component: outputs OutPut]
# [component: outputs OutPutDown]
odpf := ICFFT(mass_inject_into_zeros)
odpfd := ICFFT(mass_inject_into_zeros_down)
length(mass_inject_into_zeros) = 2048
length(mass_inject_into_zeros_down) = 2049
length(OutPutDown) = 2048
OutPut =  # no stored result
Re(odpfd) =  # no stored result
OutPutDown =  # no stored result
Re(odpfd) =  # no stored result
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# Выходной сигнал в плюсах
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# Сравнение выходного сигнала в плюсах и в маткаде
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# Сравнение выходного сигнала в плюсах и в маткаде
# Более чамарский вариант шифтера
M := submatrix(array_DPF, 0, N - 1, 0, 0)
H :=
    if colvo > 0
        for i ∈ 0 .. N - 1
            M[i] ← 0 if i < colvo
            M[i] ← 0 if i > N - colv
            for n ∈ 0 .. N/2 + colvo
                M[n + colv + 1] ← array_DPF[n]
            for j ∈ N - 1 .. N/2
                M[j - colv] ← array_DPF[j]
        M
    otherwise
        for i ∈ 0 .. N - 1
            M[i] ← 0 if ((i ≤ N/2) and (i ≥ N/2 - |colvo|))
            M[i] ← 0 if (i ≥ N/2) and (i ≤ N/2 + |colvo|)
            for n ∈ N/2 .. 0
                M[|n - |colv||] ← array_DPF[n]
            for j ∈ N/2 .. N - 1
                M[j + |colm| + 1] ← array_DPF[j]
        M
Ysas := ICFFT(M)
Ysas =  # no stored result
# Красным цветом исходный спектр, синим - сдвинутый по частотам
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