# [area: Проверка данных с ПЛИС]
file_input := READBIN("output.s16le", "int16")
# [component: outputs Im]
# [component: outputs Re]
# [component: outputs ShiftUpIm]
# [component: outputs ShiftUPRe]
file_input := submatrix(file_input, 1, last(file_input), 0, 0)  # disabled
file_input := READBIN("demod_snd.f64le", "double")  # disabled
x := CFFT(file_input)
Complex :=
    for i ∈ 0 .. last(Re)
        out[i] ← Re[i] + 1i*Im[i]
    out
n := 0 .. 150000
length(file_input) = 287984
length(Re) = 286720
ShiftUpComplex :=
    for i ∈ 0 .. last(ShiftUPRe)
        out[i] ← ShiftUPRe[i] + 1i*ShiftUpIm[i]
    out
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length(Im) = 286720
file_input =  # no stored result
# [component: outputs OutputData]
file_input[2048] = -50
OutputData := submatrix(OutputData, 1, last(OutputData), 0, 0)
max(OutputData) = 3749
min(OutputData) = -4038
length(OutputData) = 286719
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f_d := 24*10^3
fft_size := 10000
x =  # no stored result
Complex =  # no stored result
|x| = 354.789  # |C|
start := 100000
max(file_input) = 3749
x_fft := CFFT(submatrix(file_input, start, start + fft_size - 1, 0, 0))
min(file_input) = -4038
N := length(x_fft) = 10000
n := 0 .. N - 1
OutputData =  # no stored result
f_d/N = 2.4
|x_fft[0]| = 8.321
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y_fft := submatrix(ShiftUpComplex, start, start + fft_size - 1, 0, 0)
|y_fft[0]| = 307.433
N := length(y_fft) = 10000
n := 0 .. N - 1
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x_fft := CFFT(submatrix(OutputData, start, start + fft_size - 1, 0, 0))
N := length(x_fft) = 10000
f_d/N = 2.4
n := 0 .. N - 1
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